OpenVSP model (file version 5), 15 components.
Geometry view with OpenVSP parameter names; values to 6 digits, angles in degrees, lengths in the model's unit.
Overall bounding box: X_Min=-0.517767 X_Len=30.5778 Y_Min=-21.5 Y_Len=43 Z_Min=-2.27632 Z_Len=8.83772

Fuselage "CrewCapsule"
  location (X Y Z) 0.5 0 0, rotation 0 0 0
  bounding box size 10.7855 3.37973 3.5
  Design: Length=9.75
  cross sections:
    n  XLocPercent  YLocPercent  ZLocPercent  shape
    0  0            0            0            circle Circle_Diameter=2.5
    1  0.25         0            0            ellipse Ellipse_Height=3.5 Ellipse_Width=3
    2  0.5          0            0            as above
    3  0.75         0            0            as above
    4  1            0            0            circle Circle_Diameter=2.5

Human "Pilot", child of "CrewCapsule"
  location (X Y Z) 4.05435 0 -0.652174, rotation 0 31.0326 0
  bounding box size 4.67588 1.9431 3.09136
  mass: Density=68.9874 Shell_Flag=0 Mass_Area=1 Mass_Prior=0
  Anthropometric: Age=30 AutoDensity=1 BMI=27.7 BMI_pct=0.5 GenderFlag=0 LenUnit=4 Mass=212.841 MassUnit=3 SitFrac=0.51 Stature=6.125 Stature_pct=0.926198 Volume=3.08522

Custom "PilotSeat", child of "CrewCapsule"
  location (X Y Z) 3.75 0 -1.5, rotation 0 -90 0
  bounding box size 2.91432 2 2.95892
  Design: BackAngle=27 BackHeight=2.9 BackThick=0.25 SeatHeight=0.25 SeatLength=1.5 Width=2
  custom script Seat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

Human "Passenger", child of "CrewCapsule"
  location (X Y Z) 7.55435 0 -0.652174, rotation 0 31.0326 0
  bounding box size 4.12497 1.9431 3.31283
  mass: Density=69.5565 Shell_Flag=0 Mass_Area=1 Mass_Prior=0
  Anthropometric: Age=30 AutoDensity=1 BMI=27.7 BMI_pct=0.5 GenderFlag=0 LenUnit=4 Mass=212.841 MassUnit=3 SitFrac=0.51 Stature=6.125 Stature_pct=0.926198 Volume=3.05998

Custom "PassengerSeat", child of "CrewCapsule"
  location (X Y Z) 7.25 0 -1.5, rotation 0 -90 0
  bounding box size 2.91432 2 2.95892
  Design: BackAngle=27 BackHeight=2.9 BackThick=0.25 SeatHeight=0.25 SeatLength=1.5 Width=2
  custom script Seat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

Wing "MainWing1.0.0"
  location (X Y Z) 3 0 2.25, rotation 0 0 0
  symmetric about XZ
  bounding box size 10.7106 42.487 4.18427
  totals: TotalSpan=47.2 TotalProjectedSpan=41.8635 TotalChord=5.5725 TotalArea=326.244 TotalAR=5.37191 MAC=7.61407
  root: chord 10.71, twist 0, NACA 4-series Camber=0 CamberLoc=0.2 ThickChord=0.1
  sections:
    n  Span  Root_Chord  Tip_Chord  Area    Sweep  Sweep_Location  Dihedral  Twist  Twist_Location  tip airfoil
    1  20    10.71       4.29       150     0      0.25            0         0      0.25            NACA 4-series Camber=0.0398571 CamberLoc=0.377143 ThickChord=0.121429
    2  3.6   4.29        3          13.122  0      0.25            -75       0      0.25            as above

Pod "Engines", child of "MainWing1.0.0"
  location (X Y Z) -0.2 6 3, rotation 0 0 0
  symmetric about XZ
  bounding box size 6 13.7143 1.71429
  Design: FineRatio=7 Length=6

Propeller "PropGeom", child of "Engines"
  location (X Y Z) 0 6 3, rotation 0 0 0
  symmetric about XZ
  bounding box size 0.350834 19.1228 7.12281
  Design: Diameter=7.11 NumBlade=4 Beta34=20 UseBeta34Flag=1 Feather=0 Rotate=0 Precone=0 ReverseFlag=0 FoldAngle=0 PropMode=0 AF=152.389 CLi=0.540495 Chord=0.174297 Solidity=0.221922 ConstructXoC=0.5 FeatherAxisXoC=0.5 FeatherOffsetXoC=0
  cross sections:
    n  RadiusFrac  shape
    0  0.04        ellipse Ellipse_Height=0.1422 Ellipse_Width=0.2844
    1  0.4         NACA 16-series Chord=0.647842 IdealCl=0.7 ThickChord=0.144074
    2  1           NACA 16-series Chord=0.46215 IdealCl=0.2 ThickChord=0.03
  Chord along r/R (cubic Bezier): 0.04: 0.08, 0.226667: 0.15, 0.413333: 0.2, 0.6: 0.2, 0.716667: 0.2, 0.833333: 0.2, 0.95: 0.2, 0.966667: 0.2, 0.983333: 0.2, 1: 0.13
  Twist along r/R (PCHIP): 0.04: 46.75, 0.75: 20, 1: 13
  Thick along r/R (cubic Bezier): 0.04: 0.5, 0.126667: 0.3, 0.213333: 0.225, 0.3: 0.2, 0.4: 0.125, 0.5: 0.115, 0.6: 0.1, 0.733333: 0.075, 0.866667: 0.055, 1: 0.03
  CLI along r/R (cubic Bezier): 0.04: 0, 0.16: 0.7, 0.28: 0.7, 0.4: 0.7, 0.466667: 0.7, 0.533333: 0.7, 0.6: 0.7, 0.733333: 0.7, 0.866667: 0.7, 1: 0.2

Fuselage "WingConnector", child of "MainWing1.0.0"
  location (X Y Z) 1.75 0 2.25, rotation 0 0 0
  bounding box size 12.5 2.30815 2.54487
  Design: Length=12.5
  cross sections:
    n  XLocPercent  YLocPercent  ZLocPercent  shape
    0  0            0            -0.116713    point
    1  0.25         0            0            edit curve Width=2 Height=0.75 AbsoluteFlag=0 SymType=1 linear points (X Y): 0.388158 0, 0.286184 -0.797697, 0 -0.797697, -0.286184 -0.797697, -0.388158 0, -0.605263 0.600329, 0 0.5, 0.605263 0.600329, 0.388158 0
    2  0.5          0            0            edit curve Width=2.5 Height=0.8 AbsoluteFlag=0 SymType=1 linear points (X Y): 0.388158 0, 0.286184 -0.797697, 0 -0.797697, -0.286184 -0.797697, -0.388158 0, -0.605263 0.600329, 0 0.5, 0.605263 0.600329, 0.388158 0
    3  0.75         0            0            edit curve Width=2 Height=0.35 AbsoluteFlag=0 SymType=1 linear points (X Y): 0.388158 0, 0.286184 -0.797697, 0 -0.797697, -0.286184 -0.797697, -0.388158 0, -0.605263 0.600329, 0 0.5, 0.605263 0.600329, 0.388158 0
    4  1            0            -0.0233427   point

Pod "Floats", child of "MainWing1.0.0"
  location (X Y Z) 4 21 -1.5, rotation 0 0 0
  symmetric about XZ
  bounding box size 5 43 1
  Design: FineRatio=10 Length=5

Wing "HorizontalStabilizer1.0.0"
  location (X Y Z) 23.06 0 5.5, rotation 0 0 0
  symmetric about XZ
  bounding box size 7.00299 12.4241 0.708876
  totals: TotalSpan=12 TotalProjectedSpan=12 TotalChord=5.69 TotalArea=68.28 TotalAR=2.10896 MAC=5.79053
  root: chord 7, twist 0, NACA 4-series Camber=0 CamberLoc=0.2 ThickChord=0.1
  sections:
    n  Span  Root_Chord  Tip_Chord  Area   Sweep  Sweep_Location  Dihedral  Twist  Twist_Location  tip airfoil
    1  6     7           4.38       34.14  10     0.25            0         0      0.25            as above

Wing "VerticalStabilizer1.0.0"
  location (X Y Z) 23.06 0 1.75, rotation 90 0 0
  bounding box size 7 0.700406 4.24742
  totals: TotalSpan=4 TotalProjectedSpan=4 TotalChord=6 TotalArea=24 TotalAR=0.666667 MAC=6.05556
  root: chord 7, twist 0, NACA 4-series Camber=0 CamberLoc=0.2 ThickChord=0.1
  sections:
    n  Span  Root_Chord  Tip_Chord  Area  Sweep  Sweep_Location  Dihedral  Twist  Twist_Location  tip airfoil
    1  4     7           5          24    10     0.25            0         0      0.25            as above

Mesh "MeshGeom"
  location (X Y Z) 0 0 0, rotation 0 0 0
  bounding box size 10.7855 3.07736 3.5
  triangle mesh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

Fuselage "MainFuselage"
  location (X Y Z) 0 0 0, rotation 0 0 0
  bounding box size 30 4 4.27632
  Design: Length=30
  cross sections:
    n  XLocPercent  YLocPercent  ZLocPercent  shape
    0  0            0            0            edit curve Width=0 Height=0 AbsoluteFlag=0 SymType=1 cubic Bezier points (X Y): 0.5 0, 0.5 -0.276142, 0.276142 -0.5, 0 -0.5, -0.276142 -0.5, -0.5 -0.276142, -0.5 0, -0.5 0.276142, -0.276142 0.5, 0 0.5, 0.276142 0.5, 0.5 0.276142, 0.5 0
    1  0.125        0            -0.025       edit curve Width=3 Height=3 AbsoluteFlag=0 SymType=1 cubic Bezier points (X Y): 0.5 0, 0.424342 -0.335526, 0.0756579 -0.269737, 0 -0.447368, -0.0756579 -0.269737, -0.424342 -0.335526, -0.5 0, -0.5 0.276142, -0.276142 0.5, 0 0.5, 0.276142 0.5, 0.5 0.276142, 0.5 0
    2  0.25         0            -0.0125      edit curve Width=4 Height=4.25 AbsoluteFlag=0 SymType=1 cubic Bezier points (X Y): 0.5 0, 0.424342 -0.335526, 0.0756579 -0.269737, 0 -0.447368, -0.0756579 -0.269737, -0.424342 -0.335526, -0.5 0, -0.5 0.276142, -0.276142 0.5, 0 0.5, 0.276142 0.5, 0.5 0.276142, 0.5 0
    3  0.375        0            -0.00833333  edit curve Width=4 Height=4.5 AbsoluteFlag=0 SymType=1 cubic Bezier points (X Y): 0.5 0, 0.424342 -0.335526, 0.0756579 -0.269737, 0 -0.447368, -0.0756579 -0.269737, -0.424342 -0.335526, -0.5 0, -0.5 0.276142, -0.276142 0.5, 0 0.5, 0.276142 0.5, 0.5 0.276142, 0.5 0
    4  0.5625       0            -0.00833333  edit curve Width=3 Height=4.5 AbsoluteFlag=0 SymType=1 cubic Bezier points (X Y): 0.5 0, 0.368421 -0.319079, 0.144737 -0.328947, 0 -0.447368, -0.144737 -0.328947, -0.368421 -0.319079, -0.5 0, -0.5 0.276142, -0.276142 0.5, 0 0.5, 0.276142 0.5, 0.5 0.276142, 0.5 0
    5  1            0            0.0583333    point

Fuselage "AftFuselage", child of "MainFuselage"
  location (X Y Z) 17 0 0, rotation 0 0 0
  bounding box size 13 2.5 4.12368
  Design: Length=13
  cross sections:
    n  XLocPercent  YLocPercent  ZLocPercent  shape
    0  0            0            -0.0153846   edit curve Width=2.5 Height=4.3 AbsoluteFlag=0 SymType=1 cubic Bezier points (X Y): 0.5 0, 0.396053 -0.246711, 0.132018 -0.200658, 0 -0.447368, -0.132018 -0.200658, -0.396053 -0.246711, -0.5 0, -0.5 0.276142, -0.276142 0.5, 0 0.5, 0.276142 0.5, 0.5 0.276142, 0.5 0
    1  0.25         0            -0.0192308   edit curve Width=1.75 Height=4.3 AbsoluteFlag=0 SymType=1 cubic Bezier points (X Y): 0.5 0, 0.396053 -0.246711, 0.132018 -0.200658, 0 -0.447368, -0.132018 -0.200658, -0.396053 -0.246711, -0.5 0, -0.5 0.276142, -0.276142 0.5, 0 0.5, 0.276142 0.5, 0.5 0.276142, 0.5 0
    2  1            0            0.0576923    edit curve Width=0.15 Height=2 AbsoluteFlag=0 SymType=1 cubic Bezier points (X Y): 0.5 0, 0.396053 -0.246711, 0.132018 -0.200658, 0 -0.447368, -0.132018 -0.200658, -0.396053 -0.246711, -0.5 0, -0.5 0.276142, -0.276142 0.5, 0 0.5, 0.276142 0.5, 0.5 0.276142, 0.5 0
